// COMSOL Multiphysics 6.4.0.429 model "interior_pm_motor_stress_analysis_original.mph"
// Electromagnetic and Mechanical Analysis of an Interior Permanent Magnet Motor
// The magnets in an Interior Permanent Magnet (IPM) motor are embedded in the rotor core, where they form narrow regions known as bridges. The thickness of the magnetic bridge is an important parameter to consider in design, both from the electromagnetic and the mechanical perspectives. As the magnetic saturation in bridge areas affect the electromagnetic characteristics of an IPM, the thickness of the bridge should be kept minimum to reduce losses. However, during high-speed rotation, these narrow bridges also experience high stress, caused by centrifugal forces. These two conflicting aspects makes the design and analysis of an IPM motor challenging.
// In this example, the coupling between Solid Mechanics and Rotating Machinery, Magnetic for performing electromagnetic and mechanical analysis of an IPM motor is demonstrated. A motor with 10 rotor poles and 12 stator slots is modeled in 2D. The magnets are embedded in a V-shaped configuration inside the rotor core. The connection between magnets and rotor core is modeled as springs. The results give insight into magnetic flux density and stress distribution in the system.
// Outline of the model tree

Parameters
  Np = 10  // Number of poles
  Ns = 12  // Number of slots
  mag_h = 3[mm]  // Magnet height
  d_s = 10[mm]  // Shaft diameter
  d_r = 50.15[mm]  // Rotor diameter
  d_st = 108.84[mm]-h_sy  // Stator diameter
  airgap = 1[mm]  // Size of airgap
  d_cont = d_r+airgap/2  // Diameter of the stator-rotor continuity interface
  L = 46.6[mm]  // Out-of-plane thickness of motor
  w_rot = 14400[rpm]  // Rotational speed
  tl = mag_h/100  // Thickness of thin layer
  f_el = w_rot*Np/2  // Electrical frequency
  t_ramp = 1/f_el/20  // Time for ramping speed
  N_tsteps = 72  // Number of time steps
  Ipk = 10[A]  // Phase current peak
  init_ang = 200[deg]  // Initial current angle for peak torque
  t_step = 1/f_el/N_tsteps  // Time step
  t_end = 3/f_el  // Simulation time
  t = 0[s]  // Time variable alias
  h_sy = 3.97[mm]  // Yoke height

Functions
  rm1: Ramp | slope = 1/t_ramp

Variables
  var1 "Variables 1"
    kt = 5e11[N/m]  // Spring stiffness in tension
    kc = 5e13[N/m]  // Spring stiffness in compression
    kn = kt*(solid.tl1.ueln>=0)+kc*(solid.tl1.ueln<0)  // Stiffness of thin elastic layer in normal direction
    kt1 = 1e15[N/m]  // Stiffness of thin elastic layer in tangential direction

Selections
  uni1: Union "Rotor Structural Domains" | entitydim = 2; input = {geom1_pi1_rotor_magnets_dom, geom1_pi1_rotor_iron_dom}
  uni2: Union "Structural Domains"
    entitydim = 2
    input = {geom1_pi1_rotor_magnets_dom, geom1_pi1_rotor_iron_dom, geom1_pi2_stator_iron_dom}
  uni3: Union "Deforming Domains"
    entitydim = 2
    input = {geom1_dif1_dom, geom1_pi1_flux_barriers_dom, geom1_pi1_rotor_air_gap_dom}
  adj1: Adjacent "Shaft Boundaries" | entitydim = 2; input = {geom1_pi1_shaft_dom}; outputdim = 1
  adj2: Adjacent "Rotor Magnet Boundaries" | entitydim = 2; input = {geom1_pi1_rotor_magnets_dom}; outputdim = 1
  adj3: Adjacent "Rotor Air Pocket Boundaries" | entitydim = 2; input = {geom1_pi1_flux_barriers_dom}; outputdim = 1
  dif1: Difference "Magnet-Rotor Iron Contact Boundaries" | entitydim = 1; add = {adj2}; subtract = {adj3}
  adj4: Adjacent "Rotor Air Gap Boundaries" | entitydim = 2; input = {geom1_pi1_rotor_air_gap_dom}; outputdim = 1
  disk1: Disk "Rotating Boundaries"
    entitydim = 1
    inputent = selections
    input = {adj4}
    r = d_cont/2+airgap/4
    rin = d_cont/2-airgap/4
  disk2: Disk "Boundary Layer Boundaries"
    entitydim = 1
    input = {adj4}
    r = d_cont/2+airgap/3*4
    rin = d_cont/2-airgap/4*3

Pairs
  ap1: Identity "Identity Boundary Pair 1"
    source: boundaries 105, 106, 113, 114, 139, 140, 166, 167, 195, 196, 219, 220
    destination: boundaries 525, 526, 537, 538, 599, 600, 667, 668, 725, 726

Coordinate systems
  sys2: Cylindrical "Cylindrical System 2"

Common definitions
  rotb1: RotatingBoundary on selection disk1
    rotationType = rotationalVelocity
    rotationalVelocityExpression = generalRevolutionsPerTime
    revolutionsPerTime = w_rot*rm1(t[1/s])
  free1: DeformingDomain on selection uni3 | smoothingType = hyperelastic

Geometry
  geom1 "Geometry 1" (2D, length unit mm)
    pi1: PartInstance "Internal Rotor – V-shaped Embedded Magnets 1"
      part = part1
      inputname = {number_of_poles, number_of_modeled_poles, shaft_diam, rotor_diam, cont_diam, angle_magnets, magnet_h, rotor_bridge_size, poles_bridge_size, v_corner_bridge_size, v_distance, flux_barrier_size, flux_barrier_indent_fraction, Arkkio_toggle, allow_inconsistent_parameters, relative_tolerance}
      inputexpr = {Np, Np, d_s, d_r, d_cont, 30[deg], mag_h, 0.3[mm], 0.3[mm], 0.3[mm], 0.3[mm], 0.3[mm], 0, 0, 0, 1e-3}
      inputvalue = {10.0, 10.0, 10.0 [mm], 50.15 [mm], 50.65 [mm], 30.0 [°], 3.0 [mm], 0.3 [mm], 0.3 [mm], 0.3 [mm], 0.3 [mm], 0.3 [mm], 0.0, 0.0, 0.0, 0.001}
      selnamedom = {Shaft, Rotor air gap, Rotor Magnets, Rotor iron, Flux barriers, Rotor air, Rotor solid domains, All domains}
      selkeepdom = {on, on, on, on, on, on, on, on}
      selshowdom = {on, on, on, on, on, on, on, on}
      seltagdom = {pi1_shaft.dom, pi1_rotor_air_gap.dom, pi1_rotor_magnets.dom, pi1_rotor_iron.dom, pi1_flux_barriers.dom, pi1_rotor_air.dom, pi1_rotor_solid_domains.dom, pi1_all.dom}
      selnamebnd = {Magnet north poles, Exterior, Magnet south poles}
      selshowbnd = {on, on, on}
      seltagbnd = {pi1_magnet_north_poles.bnd, pi1_exterior, pi1_magnet_south_poles}
      selkeepnoncontr = off
      argunit = {, , m, m, m, °, m, m, m, m, m, m, , , , }
      lengthunit = mm
    c1: Circle | r = 18
    c2: Circle | r = 10
    r1: Rectangle | size = {30, 3}; base = center; pos = {15, 0}
    rot1: Rotate | input = r1; rot = range((360/Np)/2,360/Np,360-360/Np/2); indexattrtag = rot1.index
    dif1: Difference | input = c1; input2 = c2, rot1
    uni1: Union "Union: Rotor" | input = dif1, pi1
    adjsel1: AdjacentSelection "Rotor Air Pocket Points" | entitydim = 2; input = {pi1_flux_barriers.dom}
    adjsel2: AdjacentSelection "Rotor Air Channel Points" | entitydim = 2; input = {dif1.dom}
    adjsel3: AdjacentSelection "Rotor Magnet Points" | entitydim = 2; input = {pi1_rotor_magnets.dom}
    difsel1: DifferenceSelection "Rotor Air Pocket Fillet Points" | add = {adjsel1}; subtract = {adjsel3}; entitydim = 0
    fil1: Fillet | point = selection difsel1; radius = 0.5[mm]
    fil2: Fillet
      point = fil1(1) points 90, 91, 110, 111, 125, 126, 135-138, 155, 156, 172, 173, 184-187, 208-211, 222, 223, 239, 240, 257-260, 269, 270, 284, 285, 304, 305
      radius = 2[mm]
    pi2: PartInstance "External Stator – Slotted 1"
      part = part2
      inputname = {number_of_slots, number_of_modeled_slots, backiron_th, stator_diam, external_air_size, cont_diam, shoe_h, shoe_w, tooth_h, tooth_w, shoe_fillet_size, slot_outer_fillet_size, slot_inner_fillet_size, slot_winding_type, Arkkio_toggle, allow_inconsistent_parameters, relative_tolerance}
      inputexpr = {Ns, Ns, h_sy, d_st, 6[mm], d_cont, 1.5[mm], 12[mm], 22.87[mm], 8[mm], 0.4[mm], 0.5[mm], 0.5[mm], 2, 2, 0, 1e-3}
      inputvalue = {12.0, 12.0, 3.97 [mm], 104.87 [mm], 6.0 [mm], 50.65 [mm], 1.5 [mm], 12.0 [mm], 22.87 [mm], 8.0 [mm], 0.4 [mm], 0.5 [mm], 0.5 [mm], 2.0, 2.0, 0.0, 0.001}
      selnamedom = {Stator iron, Stator slots, Stator air, All domains}
      selkeepdom = {on, on, off, on}
      selshowdom = {on, on, on, on}
      seltagdom = {pi2_stator_iron.dom, pi2_stator_slots, pi2_stator_air.dom, pi2_all.dom}
      selnamebnd = Exterior
      selshowbnd = on
      seltagbnd = pi2_exterior
      selkeepnoncontr = off
      argunit = {, , m, m, m, m, m, m, m, m, m, m, m, , , , }
      lengthunit = mm
    fin: Finalize "Form Assembly" | action = assembly
  part1 "Internal Rotor – V-shaped Embedded Magnets" (2D, length unit m)
    pch1: ParameterCheck "Parameter Check 1 (rotor_diam)"
      condition = !(allow_inconsistent_parameters)&&!(rotor_diam>=rd_l_l)
    pch2: ParameterCheck "Parameter Check 2 (number of poles)"
      condition = !(allow_inconsistent_parameters)&&!(((number_of_poles/2)==floor(number_of_poles/2)) && (number_of_poles>=4))
    pch3: ParameterCheck "Parameter Check 3 (number of poles)"
      condition = !(allow_inconsistent_parameters)&&!(number_of_poles<=num_p_u_l)
    pch4: ParameterCheck "Parameter Check 4 (number of modeled poles)"
      condition = !(allow_inconsistent_parameters)&&!((number_of_modeled_poles==floor(number_of_modeled_poles))&&(number_of_modeled_poles>=1))
    pch5: ParameterCheck "Parameter Check 5 (number of modeled poles)"
      condition = !(allow_inconsistent_parameters)&&!(number_of_modeled_poles<=number_of_poles)
    pch6: ParameterCheck "Parameter Check 6 (shaft_diam)"
      condition = !(allow_inconsistent_parameters)&&!(shaft_diam>=2*smallest_detail)
    pch7: ParameterCheck "Parameter Check 7 (shaft_diam)"
      condition = !allow_inconsistent_parameters && !((shaft_diam/2)<=(yD-smallest_detail))
    pch8: ParameterCheck "Parameter Check 8 (rotor_bridge_size)"
      condition = !allow_inconsistent_parameters &&!(rotor_bridge_size>=smallest_detail)
    pch9: ParameterCheck "Parameter Check 9 (rotor_bridge_size)"
      condition = !allow_inconsistent_parameters &&!(rotor_bridge_size<=rbs_u_l)
    pch10: ParameterCheck "Parameter Check 10 (poles_bridge_size)"
      condition = !allow_inconsistent_parameters &&!(poles_bridge_size>=smallest_detail)
    pch11: ParameterCheck "Parameter Check 11 (poles_bridge_size)"
      condition = !allow_inconsistent_parameters &&!(poles_bridge_size<=pbs_u_l)
    pch12: ParameterCheck "Parameter Check 12 (v_distance)"
      condition = !allow_inconsistent_parameters &&!(v_distance<=vd_u_l)
    pch13: ParameterCheck "Parameter Check 13 (v_distance)"
      condition = !allow_inconsistent_parameters &&!((v_distance==0)||(v_distance>smallest_detail))
    pch14: ParameterCheck "Parameter Check 14 (v_corner_bridge_size)"
      condition = !allow_inconsistent_parameters &&!((v_corner_bridge_size==0) || (v_corner_bridge_size>=(2*smallest_detail)))
    pch15: ParameterCheck "Parameter Check 15 (v_corner_bridge_size)"
      condition = !allow_inconsistent_parameters &&!((v_corner_bridge_size<=vcb_u_l)||(v_corner_bridge_size==vd_lim)||(vd_lim==0))
    pch16: ParameterCheck "Parameter Check 16 (flux_barrier_size)"
      condition = !allow_inconsistent_parameters &&!((flux_barrier_size==0) || (flux_barrier_size>=smallest_detail))
    pch17: ParameterCheck "Parameter Check 17 (flux_barrier_size)"
      condition = !allow_inconsistent_parameters &&!(flux_barrier_size<=fbs_u_l)
    pch18: ParameterCheck "Parameter Check 18 (magnet_h)"
      condition = !allow_inconsistent_parameters&&!(magnet_h>=smallest_detail)
    pch19: ParameterCheck "Parameter Check 19 (magnet_h)"
      condition = !allow_inconsistent_parameters &&!(magnet_h<=mh_u_l)
    pch20: ParameterCheck "Parameter Check 20 (angle_magnets)"
      condition = !(allow_inconsistent_parameters)&&!(angle_magnets>=0)
    pch21: ParameterCheck "Parameter Check 21 (angle_magnets)"
      condition = !(allow_inconsistent_parameters)&&!(angle_magnets<=(90[deg]-sector_angle/2))
    pch22: ParameterCheck "Parameter Check 22 (flux_barrier_indent_fraction)"
      condition = !(allow_inconsistent_parameters)&&!((flux_barrier_indent_fraction==1)||(flux_barrier_indent_fraction==0)||(((flux_barrier_indent_fraction*magnet_h_lim)>=smallest_detail) && (((1-flux_barrier_indent_fraction)*magnet_h_lim)>=smallest_detail)))
    pch23: ParameterCheck "Parameter Check 23 (cont_diam)"
      condition = !(allow_inconsistent_parameters)&&!((cont_diam >=rotor_diam)||cont_diam==0)
    pch24: ParameterCheck "Parameter Check 24 (cont_diam)"
      condition = !(allow_inconsistent_parameters)&&!(cont_diam<=cd_u_l)
    c1: Circle "Circle 1 (Shaft sector)"
      r = shaft_d_lim/2
      angle = sector_angle
      rot = 90[deg]-sector_angle/2
      iscircularsectorold = on
    rot1: Rotate | input = selection c1; rot = sector_angle*range(0,1,floor(nmp_l)-1); indexattrtag = rot1.index
    shaft: Union "%Shaft[motorparts]" | input = selection rot1; edge = all
    if1: If "If 1 (Draw Rotor air)" | condition = diam_cont_lim>rd_lim
    c2: Circle
      type = curve
      r = diam_cont_lim/2
      angle = sector_angle
      rot = 90[deg]-sector_angle/2
      layername = Layer 1
      layer = (diam_cont_lim-rd_lim)/2
      layernameold = Layer 1
      iscircularsectorold = on
    csol1: ConvertToSolid "Convert to Solid 1 (Rotor air gap sector)" | input = c2
    rot2: Rotate | input = selection csol1; rot = sector_angle*range(0,1,floor(nmp_l)-1); indexattrtag = rot2.index
    rotor_air_gap: Union "%Rotor_air_gap" | input = selection rot2; edge = all
    if10: If "If 10 (draw Arkkio air gap)" | condition = Arkkio_toggle==1
    c5: Circle
      type = curve
      r = diam_cont_lim/2
      angle = sector_angle
      rot = 90[deg]-sector_angle/2
      layername = Layer 1
      layer = (diam_cont_lim-rd_lim)/4
    csol3: ConvertToSolid | input = c5
    rot9: Rotate | input = selection csol3; rot = sector_angle*range(0,1,floor(nmp_l)-1); indexattrtag = rot9.index
    arkkio_air_gap: Union "%Arkkio_air_gap" | input = selection rot9; edge = all
    endif10: EndIf "End If 10 (draw Arkkio air gap)"
    endif1: EndIf "End If 1 (Draw rotor air)"
    r1: Rectangle | size = {w_magnets, magnet_h_lim}; pos = {xD+fbs_lim*ca, yD+fbs_lim*sa}; rot = ang_mag_lim
    sel1: ExplicitSelection "Explicit Selection 1 (Magnets north and south poles)" | selection = r1(1) boundaries 1, 3
    mir1: Mirror | input = r1; keep = on; axis = {1, 0}
    uni3: Union "Rotor magnets sector" | input = mir1, r1
    rot3: Rotate | input = selection uni3; rot = sector_angle*range(0,1,floor(nmp_l)-1); indexattrtag = rot3.index
    rotor_magnets: Union "%Rotor_Magnets" | input = selection rot3; edge = all
    copy1: Copy | input = selection rotor_magnets; keep = on; displx = 0; disply = 0; indexattrtag = copy1.index
    c3: Circle
      type = curve
      r = rd_lim/2
      angle = sector_angle
      rot = 90[deg]-sector_angle/2
      layername = Layer 1
      layer = rd_lim/2-shaft_d_lim/2
      layernameold = Layer 1
      iscircularsectorold = on
    csol2: ConvertToSolid "Disk sector (Iron+Magnets+Flux barriers) original" | input = c3
    if2: If "If 2 (Draw flux barrier)" | condition = fbif_lim!=1
    tfbr: Polygon
      source = table
      table = 
        {xAi, yAi}
        {xAi*(rd_lim/2-rbs_lim)/sqrt(xAi^2+yAi^2), yAi*(rd_lim/2-rbs_lim)/sqrt(xAi^2+yAi^2)}
        {xB, yB}
    tfbl: Mirror | input = tfbr; keep = on; axis = {1, 0}
    tfbs: Union | input = tfbl, tfbr
    if12: If "If 12 (Draw central flux barrier)" | condition = !((ang_mag_lim==0)&&(vcb_lim==vd_lim))
    cfb0: Polygon | source = table; table = {{xDi, yDi}, {xC, yC}, {-xC, yC}, {-xDi, yDi}}
    endif12: EndIf "End If 12 (Draw central flux barrier)"
    if3: If "If 3 (Draw extraflux barrier)" | condition = fbs_lim>0
    refbir: Rectangle | size = {fbs_lim, (1-fbif_lim)*magnet_h_lim}; pos = {xDi, yDi}; rot = ang_mag_lim
    refber: Rectangle | size = {fbs_lim, (1-fbif_lim)*magnet_h_lim}; pos = {xB, yB}; rot = ang_mag_lim+180[deg]
    refbil: Mirror | input = refbir; keep = on; axis = {1, 0}
    refbel: Mirror | input = refber; keep = on; axis = {1, 0}
    efbs: Union | input = refber, refbir, refbel, refbil
    endif3: EndIf "End If 3 (Draw extraflux barrier)"
    if4: If "If 4 (Draw central bridge)" | condition = (vcb_lim>0)&&!((ang_mag_lim==0)&&(vcb_lim==vd_lim))
    rcfbk: Rectangle | size = {vcb_lim, magnet_h_lim*ca}; pos = {-vcb_lim/2, yD}
    cfb: Difference | input = cfb0; input2 = selection rcfbk
    endif4: EndIf "End If 4 (Draw central bridge)"
    dsk: Union | input = cfb, efbs, tfbs; edge = all
    endif2: EndIf "End If 2 (Draw flux barrier)"
    dif1: Difference "Difference 1 (Rotor iron sector)" | input = csol2; input2 = copy1, dsk
    rot4: Rotate | input = selection dif1; rot = sector_angle*range(0,1,floor(nmp_l)-1); indexattrtag = rot4.index
    rotor_iron: Union "%Rotor_iron" | input = selection rot4; edge = all
    if11: If "If 11 (Draw flux barrier)" | condition = fbif_lim!=1
    c4: Circle | r = rd_lim/2; angle = sector_angle; rot = 90[deg]-sector_angle/2; iscircularsectorold = on
    fluxbarrierssector: Difference
      input = c4
      input2 = rotor_iron, shaft, rotor_magnets
      keepadd = on
      keepsubtract = on
    del1: Delete "Delete Entities 1" | input = c4
    rot5: Rotate
      input = selection fluxbarrierssector
      rot = sector_angle*range(0,1,floor(nmp_l)-1)
      indexattrtag = rot5.index
    flux_barriers: Union "%Flux_barriers" | input = selection rot5; edge = all
    endif11: EndIf "End If 11 (Draw flux barrier)"
    rotor_air: UnionSelection "%Rotor_air" | entitydim = -1; input = {flux_barriers, rotor_air_gap}; selshow = dom
    north1: Polygon
      type = open
      source = table
      table = {{xD+fbs_lim*ca, yD+fbs_lim*sa}, {xA-fbs_lim*ca, yA-fbs_lim*sa}}
    north2: Mirror "Mirror 2a" | input = north1; keep = on; axis = {1, 0}
    if5: If "If 5 (nmp_l>=2)" | condition = nmp_l>=2
    north3: Polygon
      type = open
      source = table
      table = {{xC+fbs_lim*ca, yC+fbs_lim*sa}, {xB-fbs_lim*ca, yB-fbs_lim*sa}}
    north4: Mirror | input = north3; keep = on; axis = {1, 0}
    outernoths: Rotate | input = north3, north4; rot = sector_angle; indexattrtag = outernoths.index
    endif5: EndIf "End If 5 (nmp_l>=2)"
    innernorthsrot: Rotate "Inner north poles rotations"
      input = north1, north2
      rot = 2*sector_angle*range(0,1,floor((nmp_l-1)/2))
      indexattrtag = innernorthsrot.index
    if6: If "If 6 (nmp_l>=2)" | condition = nmp_l>=2
    outernorthsrot: Rotate "Outer north poles rotations"
      input = outernoths
      rot = 2*sector_angle*range(0,1,floor((nmp_l)/2-1))
      indexattrtag = outernorthsrot.index
    endif6: EndIf "End If 6 (nmp_l>=2)"
    unisel2: UnionSelection | entitydim = -1; input = {innernorthsrot, outernorthsrot}
    magnet_north_poles: Union "%Magnet_north_poles" | input = selection unisel2
    rotor_solid_domains: UnionSelection "%Rotor_solid_domains"
      entitydim = -1
      input = {shaft, rotor_iron, rotor_magnets}
      selshow = dom
    comsel1: ComplementSelection | entitydim = -1
    all: Union "%All_domains" | input = selection comsel1
    exterior: AdjacentSelection | entitydim = 2; input = {all.dom}; outputdim = 1
    magnet_south_poles: DifferenceSelection "%Magnet_south_poles"
      entitydim = 1
      add = {sel1}
      subtract = {magnet_north_poles.bnd}
    if7: If "If 7 (Less than entiry geometry)" | condition = nmp_l<num_p_lim
    rot6: Rotate | input = all; rot = -(90[deg]-sector_angle/2); indexattrtag = rot6.index
    BoxSelection1: BoxSelection | entitydim = 1; xmin = -eps; ymin = -eps; ymax = eps; condition = inside
    rot7: Rotate | input = rot6; rot = 180[deg]-sector_angle*nmp_l; indexattrtag = rot7.index
    BoxSelection2: BoxSelection | entitydim = 1; xmax = eps; ymin = -eps; ymax = eps; condition = inside
    periodic_source: UnionSelection "%Periodic_source" | entitydim = 1; input = {BoxSelection1}
    periodic_boundaries: UnionSelection "%Periodic_boundaries" | entitydim = 1; input = {BoxSelection1, BoxSelection2}
    rot8: Rotate "Rotate 8a" | input = rot7; rot = -(180[deg]-sector_angle*nmp_l); indexattrtag = rot8.index
    endif7: EndIf "End If 7 (Less than entiry geometry)"
  part2 "External Stator – Slotted" (2D, length unit m)
    pch1: ParameterCheck "Parameter Check 1 (stator_diam)"
      condition = !(allow_inconsistent_parameters)&&!(stator_diam>=sd_l_l)
    pch2: ParameterCheck "Parameter Check 2 (number_of_slots)"
      condition = !(allow_inconsistent_parameters)&&!((number_of_slots==floor(number_of_slots)) && number_of_slots>=2)
    pch3: ParameterCheck "Parameter Check 3 (number of slots)"
      condition = !(allow_inconsistent_parameters)&&!(number_of_slots<=num_s_u_l)
    pch4: ParameterCheck "Parameter Check 4 (number of modeled slots)"
      condition = !(allow_inconsistent_parameters)&&!((number_of_modeled_slots==floor(number_of_modeled_slots))&&(number_of_modeled_slots>=1))
    pch5: ParameterCheck "Parameter Check 5 (number of modeled slots)"
      condition = !(allow_inconsistent_parameters)&&!(number_of_modeled_slots<=number_of_slots)
    pch6: ParameterCheck "Parameter Check 6 (backiron_th)"
      condition = !(allow_inconsistent_parameters)&&!(backiron_th<=bit_u_l)
    pch7: ParameterCheck "Parameter Check 7 (backiron_th)"
      condition = !(allow_inconsistent_parameters)&&!(backiron_th>=smallest_detail)
    pch8: ParameterCheck "Parameter Check 8 (external_air_size)"
      condition = !allow_inconsistent_parameters&&!((external_air_size==0) || (external_air_size>=smallest_detail))
    pch9: ParameterCheck "Parameter Check 9 (external_air_size)"
      condition = !allow_inconsistent_parameters&&!(external_air_size<=eas_u_l)
    pch10: ParameterCheck "Parameter Check 10 (cont_diam)"
      condition = !(allow_inconsistent_parameters)&&!(cont_diam>=cd_l_l)
    pch11: ParameterCheck "Parameter Check 11 (cont_diam)"
      condition = !(allow_inconsistent_parameters)&&!(cont_diam<=cd_u_l)
    pch12: ParameterCheck "Parameter Check 12 (shoe_h)" | condition = !allow_inconsistent_parameters && !(shoe_h<=sh_u_l)
    pch13: ParameterCheck "Parameter Check 13 (shoe_h)"
      condition = !allow_inconsistent_parameters && !((shoe_h>=smallest_detail)||(shoe_h==0))
    pch14: ParameterCheck "Parameter Check 14 (shoe_w)" | condition = !allow_inconsistent_parameters && !(shoe_w<=sw_u_l)
    pch15: ParameterCheck "Parameter Check 15 (shoe_w)"
      condition = !allow_inconsistent_parameters && !(shoe_w>=tw_lim)&&!(sh_lim==0)
    pch16: ParameterCheck "Parameter Check 16 (tooth_h)"
      condition = !(allow_inconsistent_parameters)&&!(tooth_h>=2*smallest_detail)
    pch17: ParameterCheck "Parameter Check 17 (tooth_h)"
      condition = !(allow_inconsistent_parameters)&&!(tooth_h<=th_u_l)
    pch18: ParameterCheck "Parameter Check 18 (tooth_w)" | condition = !allow_inconsistent_parameters&&!(tooth_w>=tw_l_l)
    pch19: ParameterCheck "Parameter Check 19 (tooth_w)" | condition = !allow_inconsistent_parameters&&!(tooth_w<=tw_u_l)
    pch20: ParameterCheck "Parameter Check 20 (shoe_fillet_size)"
      condition = !allow_inconsistent_parameters && !((shoe_fillet_size<=shoe_height_max_fillet)||(shoe_h==0))
    pch21: ParameterCheck "Parameter Check 21 (shoe_fillet_size)"
      condition = !allow_inconsistent_parameters && !(shoe_fillet_size<=shoe_width_max_fillet)
    pch22: ParameterCheck "Parameter Check 22 (shoe_fillet_size)"
      condition = !allow_inconsistent_parameters && !((shoe_fillet_size>=smallest_detail)||(shoe_fillet_size==0))
    pch23: ParameterCheck "Parameter Check 23 (slot_inner_fillet_size)"
      condition = !allow_inconsistent_parameters && !(slot_inner_fillet_size<=slot_height_max_inner_fillet)
    pch24: ParameterCheck "Parameter Check 24 (slot_inner_fillet_size)"
      condition = !allow_inconsistent_parameters && !(slot_inner_fillet_size<=slot_width_max_inner_fillet)
    pch25: ParameterCheck "Parameter Check 25 (slot_inner_fillet_size)"
      condition = !allow_inconsistent_parameters && !((slot_inner_fillet_size>=smallest_detail)||(slot_inner_fillet_size==0))
    pch26: ParameterCheck "Parameter Check 26 (slot_outer_fillet_size)"
      condition = !allow_inconsistent_parameters && !(slot_outer_fillet_size<=slot_height_max_outer_fillet)
    pch27: ParameterCheck "Parameter Check 27 (slot_outer_fillet_size)"
      condition = !allow_inconsistent_parameters && !(slot_outer_fillet_size<=slot_width_max_outer_fillet)
    pch28: ParameterCheck "Parameter Check 28 (slot_outer_fillet_size)"
      condition = !allow_inconsistent_parameters && !((slot_outer_fillet_size>=smallest_detail)||(slot_outer_fillet_size==0))
    c1: Circle
      type = curve
      r = sd_lim/2
      angle = sector_angle
      rot = 90[deg]
      layername = Layer 1
      layer = bit_lim
      layernameold = Layer 1
      iscircularsectorold = on
      contributeto = csel1
    csol1: ConvertToSolid | input = c1
    tooth: Rectangle
      size = {tw_lim/2, th_lim-sh_lim/2}
      pos = {-tw_lim/2, inner_radius_tooth+sh_lim/2}
      contributeto = csel1
    c2: Circle
      type = curve
      r = sd_lim
      angle = sector_angle
      rot = 90[deg]-sector_angle/2
      layername = Layer 1
      layer = sd_lim/2
      layernameold = Layer 1
      iscircularsectorold = on
      geomattr = {construction, on}
      geomattrlevel = 16
    dif1: Difference | input = selection tooth; input2 = c2, csol1; keepsubtract = on
    if1: If "If 1 (shoe)" | condition = (sh_lim>0)&&(sw_lim>tw_lim)
    c3: Circle
      type = curve
      r = inner_radius_tooth+sh_lim
      angle = shoe_angle/2
      rot = 90[deg]-asin(sw_lim/2/(inner_radius_tooth+sh_lim))[rad]+shoe_angle/2
      layername = Layer 1
      layer = sh_lim
      layernameold = Layer 1
      iscircularsectorold = on
      contributeto = csel1
    csol2: ConvertToSolid | input = c3
    dif2: Difference | input = selection tooth; input2 = csol2; keepsubtract = on
    if2: If "If 2 (shoe fillets)" | condition = shoe_fillet_size_lim>0
    shoefpoints: DiskSelection "Points of shoe to fillet"
      inputent = selections
      input = {csol2.pnt}
      r = inner_radius_tooth+sh_lim/2
      angle1 = 90[deg]+shoe_angle/4
      angle2 = 90[deg]+shoe_angle
    shoewf: Fillet "Shoe with fillets" | point = selection shoefpoints; radius = shoe_fillet_size_lim
    endif2: EndIf "End If 2 (shoe fillets)"
    endif1: EndIf "End If 1 (shoe)"
    mir1: Mirror | input = dif2, shoewf; keep = on; axis = {sd_lim*cos(sector_angle/2), sd_lim*sin(sector_angle/2)}
    uni1: Union "Iron sector" | input = selection csel1; edge = all
    if3: If "If 3 (slot inner fillet)" | condition = (sh_lim>0)&&(slot_inner_fillet_size_lim>0)
    disksel1: DiskSelection
      r = outer_radius_slot-slot_radial_size+smallest_detail
      rin = outer_radius_slot-slot_radial_size-smallest_detail
      angle1 = 90[deg]+sector_angle-(asin((tw_lim/2)/(inner_radius_tooth+sh_lim)))[rad]
      angle2 = 90[deg]+asin((tw_lim/2)/(inner_radius_tooth+sh_lim))[rad]
    fil1: Fillet | point = selection disksel1; radius = slot_inner_fillet_size_lim
    endif3: EndIf "End If 3 (slot inner fillet)"
    if4: If "If 4 (slot outer fillet)" | condition = slot_outer_fillet_size_lim>0
    disksel2: DiskSelection
      r = outer_radius_slot+smallest_detail
      rin = outer_radius_slot-smallest_detail
      angle1 = 90[deg]+sector_angle-upper_tooth_angle
      angle2 = 90[deg]+upper_tooth_angle
    fil2: Fillet | point = selection disksel2; radius = slot_outer_fillet_size_lim
    endif4: EndIf "End If 4 (slot outer fillet)"
    rot1: Rotate "Iron sector rotation"
      input = selection uni1
      rot = sector_angle*range(0,1,nms_lim-1)
      indexattrtag = rot1.index
    stator_iron: Union "%Stator_iron" | input = selection uni1; edge = all
    c4: Circle
      type = curve
      r = sd_lim/2-bit_lim
      angle = sector_angle
      rot = 90[deg]
      layername = Layer 1
      layer = slot_radial_size
      layernameold = Layer 1
      iscircularsectorold = on
    csol3: ConvertToSolid | input = c4
    slotfillingTypeOnesector: Difference "slot_winding_type 1 sector"
      input = csol3
      input2 = stator_iron
      keepsubtract = on
      edge = all
    if5: If "If (slot_winding_type!==1)" | condition = slot_winding_type!=1
    if6: If "If (slot_winding_type==2)" | condition = slot_winding_type==2
    par1: Partition "Partition Objects 1" | input = selection slotfillingTypeOnesector; tool = c2
    slotfilling: ElseIf "Else If (slot_winding_type==3)" | condition = slot_winding_type==3||slot_winding_type==4
    c5: Circle
      type = curve
      r = (sd_lim/2-bit_lim)-slot_layer_size_outer
      angle = sector_angle
      rot = 90[deg]
      layername = Layer 2
      layer = slot_layer_size_inner
    par2: Partition "Partition Objects 2" | input = selection slotfillingTypeOnesector; tool = c5
    if7: If "If (slot_winding_type==4)" | condition = slot_winding_type==4
    par3: Partition "Partition Objects 3" | input = selection slotfillingTypeOnesector; tool = c2
    endif5: EndIf
    endif6: EndIf
    endif7: EndIf "End If 7 (slot_winding_type)"
    rot2: Rotate "slot_winding_type 1 sector rotation"
      input = selection slotfillingTypeOnesector
      rot = sector_angle*range(0,1,nms_lim-1)
      indexattrtag = rot2.index
    slotfillingTypeOne: Union "slot_winding_type 1" | input = selection rot2
    stator_slots: UnionSelection "%Stator_slots" | entitydim = 2; input = {slotfillingTypeOne.dom}
    unisel1: UnionSelection "All solid rotor parts" | entitydim = -1; input = {stator_iron, slotfillingTypeOne}
    c6: Circle | r = r_external_air; angle = sector_angle; rot = 90[deg]; iscircularsectorold = on
    c7: Circle | r = cd_lim/2; angle = sector_angle; rot = 90[deg]; iscircularsectorold = on
    dif3: Difference | input = c6; input2 = c7
    airsector: Difference "%Stator_air_sector" | input = dif3; input2 = selection unisel1; keepsubtract = on
    rot3: Rotate "%Stator_air_sector_rotation"
      input = selection airsector
      rot = sector_angle*range(0,1,nms_lim-1)
      indexattrtag = rot3.index
    stator_air: Union "%Stator_air" | input = selection rot3; edge = all
    if8: If "If 8 (draw Arkkio air gap)" | condition = (Arkkio_toggle==1)&&(cd_lim<2*inner_radius_tooth)
    c8: Circle
      type = curve
      r = inner_radius_tooth - (2*inner_radius_tooth-cd_lim)/4
      angle = sector_angle
      rot = 90[deg]
      layername = Layer 1
      layer = (2*inner_radius_tooth-cd_lim)/4
    csol4: ConvertToSolid | input = c8
    rot4: Rotate | input = selection csol4; rot = sector_angle*range(0,1,floor(nms_lim)-1); indexattrtag = rot4.index
    arkkio_air_gap: Union "%Arkkio_air_gap" | input = selection rot4; edge = all
    endif8: EndIf "End If 8 (draw Arkkio air gap)"
    comsel1: ComplementSelection | entitydim = -1; input = {c2}
    all: Union "%All_domains" | input = selection comsel1
    exterior: AdjacentSelection | entitydim = 2; input = {all.dom}; outputdim = 1
    if9: If "If 9 (Less than entiry geometry)" | condition = nms_lim<num_s_lim
    rot5: Rotate | input = all; rot = -90[deg]; indexattrtag = rot5.index
    BoxSelection1: BoxSelection | entitydim = 1; xmin = -eps; ymin = -eps; ymax = eps; condition = inside
    rot6: Rotate | input = rot5; rot = 180[deg]-sector_angle*nms_lim; indexattrtag = rot6.index
    BoxSelection2: BoxSelection | entitydim = 1; xmax = eps; ymin = -eps; ymax = eps; condition = inside
    periodic_source: UnionSelection "%Periodic_source" | entitydim = 1; input = {BoxSelection1}
    periodic_boundaries: UnionSelection "%Periodic_boundaries" | entitydim = 1; input = {BoxSelection1, BoxSelection2}
    rot7: Rotate | input = rot6; rot = -(180[deg]-sector_angle*nms_lim); indexattrtag = rot7.index
    endif9: EndIf "End If 9 (Less than entiry geometry)"

Materials
  mat1: Common "Air" on all domains
    def: def "Basic"
      thermalexpansioncoefficient = alpha_p(pA,T)
      molarmass = 0.02897[kg/mol]
      bulkviscosity = muB(T)
      relpermeability = 1
      relpermittivity = 1
      dynamicviscosity = eta(T)
      ratioofspecificheat = 1.4
      electricconductivity = 0[S/m]
      heatcapacity = Cp(T)
      density = rho(pA,T)
      thermalconductivity = k(T)
      soundspeed = cs(T)
      eta: Piecewise | arg = T; pieces = {200.0, 1600.0, -8.38278E-7+8.35717342E-8*T^1-7.69429583E-11*T^2+4.6437266E-14*T^3-1.06585607E-17*T^4}; argunit = K; fununit = Pa*s
      Cp: Piecewise | arg = T; pieces = {200.0, 1600.0, 1047.63657-0.372589265*T^1+9.45304214E-4*T^2-6.02409443E-7*T^3+1.2858961E-10*T^4}; argunit = K; fununit = J/(kg*K)
      rho: Analytic | expr = pA*0.02897/R_const[K*mol/J]/T; args = {pA, T}; fununit = kg/m^3; argunit = {Pa, K}
      k: Piecewise | arg = T; pieces = {200.0, 1600.0, -0.00227583562+1.15480022E-4*T^1-7.90252856E-8*T^2+4.11702505E-11*T^3-7.43864331E-15*T^4}; argunit = K; fununit = W/(m*K)
      cs: Analytic | expr = sqrt(1.4*R_const[K*mol/J]/0.02897*T); args = T; fununit = m/s; argunit = K
      an1: Analytic | funcname = alpha_p; expr = -1/rho(pA,T)*d(rho(pA,T),T); args = {pA, T}; fununit = 1/K; argunit = {Pa, K}
      an2: Analytic "Analytic 2a" | funcname = muB; expr = 0.6*eta(T); args = T; fununit = Pa*s; argunit = K
    RefractiveIndex: RefractiveIndex
      n = 1
      ki = 0
    NonlinearModel: NonlinearModel
      BA = def.gamma-1
    idealGas: idealGas
      Rs = R_const/Mn
      heatcapacity = Cp(T)
      ratioofspecificheat = 1.4
      molarmass = 0.02897[kg/mol]
      Cp: Piecewise | arg = T; pieces = {200.0, 1600.0, 1047.63657-0.372589265*T^1+9.45304214E-4*T^2-6.02409443E-7*T^3+1.2858961E-10*T^4}; argunit = K; fununit = J/(kg*K)
  mat2: Common "Soft Iron (Without Losses)" on domains 2, 29
    def: def "Basic"
      electricconductivity = 0[S/m]
      relpermittivity = 1
      density = 7500
    BHCurve: BHCurve
      normB = BH(normHin)
      normH = BH_inv(normBin)
      Wpm = BH_prim(normHin)
      normHin = sqrt(H1^2+H2^2+H3^2+eps)
      DESCR_PREFIX:normHin = Magnetic field norm
      normBin = sqrt(B1^2+B2^2+B3^2+eps)
      DESCR_PREFIX:normBin = Magnetic flux density norm
      BH: Interpolation
        funcnametable = {BH, 1}
        table = 
          {0, 0}
          {663.146, 1}
          {1067.5, 1.1}
          {1705.23, 1.2}
          {2463.11, 1.3}
          {3841.67, 1.4}
          {5425.74, 1.5}
          {7957.75, 1.6}
          {12298.3, 1.7}
          {20462.8, 1.8}
          {32169.6, 1.9}
          {61213.4, 2}
          {111408, 2.1}
          {188487.757, 2.2}
          {267930.364, 2.3}
          {347507.836, 2.4}
        extrap = linear
        fununit = T
        argunit = A/m
        plotfuncname = BH
        plotleftextrap = off
        defineinv = on
        defineprimfun = on
    EffectiveBHCurve: EffectiveBHCurve
      normBeff = BHeff(normHeffin)
      normHeff = BHeff_inv(normBeffin)
      Wpmeff = BHeff_prim(normHeffin)
      normHeffin = sqrt(realdot(H1,H1,1)+realdot(H2,H2,1)+realdot(H3,H3,1)+eps)
      DESCR_PREFIX:normHeffin = Effective magnetic field norm
      normBeffin = sqrt(realdot(B1,B1,1)+realdot(B2,B2,1)+realdot(B3,B3,1)+eps)
      DESCR_PREFIX:normBeffin = Effective magnetic flux density norm
      BHeff: Interpolation
        funcnametable = {BHeff, 1}
        table = 
          {0, 0}
          {663.146, 1.00000005169}
          {1067.5, 1.49364951241}
          {1705.23, 1.94153284613}
          {2463.11, 2.25776566937}
          {3841.67, 2.60998064243}
          {5425.74, 2.86644520908}
          {7957.75, 3.14414380972}
          {12298.3, 3.44853805165}
          {20462.8, 3.78167119737}
          {32169.6, 4.05834559011}
          {61213.4, 4.42064655295}
          {111408, 4.72127408955}
          {188487.757, 4.97214814072}
          {267930.364, 5.14551086086}
          {347507.836, 5.24551086143}
        extrap = linear
        fununit = T
        argunit = A/m
        plotfuncname = BHeff
        plotleftextrap = off
        defineinv = on
        defineprimfun = on
    Enu: Enu "Young's modulus and Poisson's ratio"
      E = 185[GPa]
      nu = 0.3
  mat3: Common "N42 (Sintered NdFeB)" on selection geom1_pi1_rotor_magnets_dom
    def: def "Basic"
      electricconductivity = 1/1.4[uohm*m]
      relpermittivity = 1
      density = 7500
    RemanentFluxDensity: RemanentFluxDensity
      murec = 1.05
      normBr = 1.31[T]
    Enu: Enu "Young's modulus and Poisson's ratio"
      E = 160[GPa]
      nu = 0.24

Physics
  solid: SolidMechanics on selection uni2
    dependent variable u = {u, v, w}
    d.d = L
    lemm1: LinearElasticModel "Linear Elastic Material 1" (default) | coordinateSystem = sys2
    free1: Free (default)
    init1: init "Initial Values 1" (default)
    dcont1: Continuity (default)
    rotf1: RotatingFrame on selection uni1
      RotationalFrequency = RevolutionsPerTime
      rpt = w_rot*rm1(t[1/s])
      DefineSpatialFrameRotation = 1
    rms1: RigidMotionSuppression on selection geom1_pi2_stator_iron_dom
    fix1: Fixed "Fixed Constraint 1" on selection adj1
    tl1: ThinLayer on selection dif1 | thicknessApproximation = spring; lth = tl
      lemm1: LinearElasticModel "Linear Elastic Material 1" (default)
      free1: Free (default)
      spm1: SpringMaterial on selection dif1 | SpringType = FDefTot; FDefTot = {kt1*solid.tl1.uelt1, kn*solid.tl1.ueln, 0}
  rmm: RotatingMachineryMagnetic on all domains
    dependent variable A = {Ax, Ay, Az}
    d.d = L
    al1: AmperesLaw "Ampère's Law, Solid" (default) | materialType = solid
    mxb1: MixedFormulationBoundary (default)
    mi1: MagneticInsulation (default)
    init1: init "Initial Values 1" (default)
    dcont1: Continuity "Magnetic Continuity 1" (default)
    al2: AmperesLaw "Ampère's Law 2" on domains 2, 29 | ConstitutiveRelationBH = BHCurve
    cmag1: ConductingMagnet on selection geom1_pi1_rotor_magnets_dom
      PatternType = CircularPattern
      PeriodicType = Alternating
      north1: North on boundaries 382, 402
      south1: South on boundaries 378, 410
    wnd1: MultiphaseWinding on selection geom1_pi2_stator_slots
      Ipk = Ipk
      alpha_i = init_ang
      freq_t = f_el*rm1(t[1/s])
      WindingLayout = automatic
      NoPoles = Np
      NoSlots = Ns
      NoCoilsPerSlot = 2
      ph1: Phase (default)
      aPh1: Phase "Automatic Phase 1" on domains 1, 3, 4, 6, 22, 24-26
        alpha_o = 0[deg]
        signalTwoPiPeriodicFunction = cos
        rcd1: ReversedCurrentDirection on domains 1, 4, 22, 25
      aPh2: Phase "Automatic Phase 2" on domains 8, 11, 13-16, 18, 20
        alpha_o = -120[deg]
        signalTwoPiPeriodicFunction = cos
        rcd1: ReversedCurrentDirection on domains 8, 15, 16, 18
      aPh3: Phase "Automatic Phase 3" on domains 5, 7, 9, 12, 17, 19, 21, 23
        alpha_o = -240[deg]
        signalTwoPiPeriodicFunction = cos
        rcd1: ReversedCurrentDirection on domains 5, 12, 19, 21
    ark1: ArkkioTorqueCalculation on domains 1-29, 31-46

Multiphysics
  mfrm1: MagneticForcesRotatingMachinery on all domains | Solid_physics = solid; MagneticFields_physics = rmm

Mesh
  mesh1 "Mesh 1"
    size: MeshSizeDefault | hcurve = 0.9; custom = on
    size1: Size on selection geom1_pi2_stator_iron_dom | hmax = 1.5; custom = on
    ftri1: FreeTri "Free Triangular 1" on remaining entities | smoothmaxiter = 4; smoothmaxdepth = 4
    bl1: BndLayer "Boundary Layers 1" on domains 10, 99
      blp: BndLayerProp "Boundary Layer Properties" on selection disk2 | blnlayers = 1; blhminfact = 5

Studies
  std1 "Study 1"
    stat: Stationary
    time: Transient "Time Dependent" | tlist = range(0,t_step,t_end)

Solver configurations
  sol1 "Solution 1" (study std1)
    v1: Variables "Dependent Variables 1"
    s1: Stationary "Stationary Solver 1"
      dDef: Direct
      se1: Segregated
        ss1: SegregatedStep "Magnetic Potential"
        ss2: SegregatedStep "Displacement Field"
        ss3: SegregatedStep "Spatial Mesh Displacement"
      d1: Direct
    su1: StoreSolution "Solution Store 1"
    v2: Variables "Dependent Variables 2"
    t1: Time "Time-Dependent Solver 1" | bwinitstepfrac = 0.1
      dDef: Direct
      se1: Segregated
        ss1: SegregatedStep "Merged Variables"
        ss2: SegregatedStep "Magnetic Potential" | subdtech = auto
        ss3: SegregatedStep "Displacement Field"
        ss4: SegregatedStep "Spatial Mesh Displacement"
      d1: Direct
  sol2 "Solution Store 1" (study std1)

Datasets
  dset1: Solution | solution = sol1
  dset2: Solution | solution = sol2

Plots
  pg1: PlotGroup2D "von Mises Stress (solid)" | data = dset1
    surf1: Surface | expr = solid.misesGp; unit = MPa
  pg5: PlotGroup2D "Radial Stress (solid)" | data = dset1
    surf1: Surface | expr = solid.slGp11; unit = MPa; descr = Stress tensor, local coordinate system, 11-component
  pg2: PlotGroup2D "Stress, Thin Layer (solid)" | data = dset1
    line1: Line | expr = solid.misesGp; linetype = tube; radiusexpr = solid.lth/2
      sel1: Selection on boundaries 270, 272, 277, 278, 281, 283, 309, 310, 314, 316, 321, 322, 341, 343, 361, 362, 376, 378, 381, 382, 400, 402, 409, 410, 427, 429, 443, 444, 460, 462, 465, 466, 471, 473, 496, 498, 505, 506, 509, 510
  pg6: PlotGroup2D "Displacement (solid)" | data = dset1
    surf1: Surface | expr = solid.disp; unit = mm
  pg7: PlotGroup1D "Displacement"
    data = dset1
    xlabel = Time (s)
    ylabel = Displacement field, X-component (mm)
    styleconfig = gsty1
    ptgr1: PointGraph on points 264 | expr = u; legends = X-component
    ptgr2: PointGraph on points 264 | expr = v; legends = Y-component
  pg3: PlotGroup2D "Magnetic Flux Density (rmm)" | data = dset1
    surf1: Surface | expr = rmm.normB
    str1: Streamline on boundaries 1-554, 557-562, 566, 568, 571, 572, 575-578, 581, 582, 585-588, 591-594, 599-612, 615-618, 621, 622, 627-636, 643-646, 649-658, 661-668, 671, 672, 677-679, 681, 685-688, 691-696, 701-708, 711-734
      expr = {rmm.Bx, rmm.By}
      filt1: Filter | expr = !isScalingSystemDomain
    con1: Contour | expr = rmm.Az; levelrounding = off
      filt1: Filter | expr = !isScalingSystemDomain
  pg8: PlotGroup1D "Torque" | data = dset1; styleconfig = gsty1
    glob1: Global | expr = rmm.Tark_1
  pg4: PlotGroup2D "Moving Mesh" | data = dset1
    mesh1: Mesh | qualmeasure = custom; qualexpr = comp1.spatial.relVol
      sel1: MeshSelection "Selection 1" on domains 2, 28-99

Exports
  anim1: Animation "von Mises Stress (solid)" | target = player; maxframes = 50
  anim2: Animation "Magnetic Flux Density Norm (rmm)" | target = player; maxframes = 50